@Author Known Unknown;
@Date 17 / 01 / 2023;
@Description{ };

@ModellingHypothesis 'Tridimensional';
@Behaviour<generic>  'src/libBehaviour.so' 'MericCailletaudSingleCrystalViscoPlasticity';

@OutputFile 'Test.txt';

@MaterialProperty<constant> 'YoungModulus1' 208000;
@MaterialProperty<constant> 'YoungModulus2' 208000;
@MaterialProperty<constant> 'YoungModulus3' 208000;
@MaterialProperty<constant> 'PoissonRatio12' 0.3;
@MaterialProperty<constant> 'PoissonRatio23' 0.3;
@MaterialProperty<constant> 'PoissonRatio13' 0.3;
@MaterialProperty<constant> 'ShearModulus12' 80000;
@MaterialProperty<constant> 'ShearModulus23' 80000;
@MaterialProperty<constant> 'ShearModulus13' 80000;


// Other
@ExternalStateVariable 'Temperature' 330.;


// full strain control

@ImposedStrain 'EZZ' {0.: 0., 10. : 0.02};
@ImposedStrain 'EYY' 0.;
@ImposedStrain 'EXX' 0.;
@ImposedStrain 'EXY' 0.;
@ImposedStrain 'EXZ' 0.;
@ImposedStrain 'EYZ' 0.;

@Times {0.,10. in 200};
